**
** PARTS
**
*Part, name=Element
*End Part
**
**
** ASSEMBLY
**
*Assembly, name=Assembly
**
*Instance, name=Element-1, part=Element
*Node
      1, -0.400000006, -0.600000024
      2, -0.349999994, -0.600000024
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*Element, type=U1
  1,   1,   2,  23,  22
  2,   2,   3,  24,  23
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*Nset, nset=Body, generate
   1,  441,    1
*Elset, elset=Body, generate
   1,  400,    1
*UEL PROPERTY, ELSET=Body
<prop1_1>, <prop1_2>, <prop1_3>, <prop1_4>, <prop1_5>, <prop1_6>, <prop1_7>, <prop1_8>
<prop1_9>, <prop1_10>, <prop1_11>, <prop1_12>, <prop1_13>, <prop1_14>, <prop1_15>, <prop1_16>
<prop1_17>, <prop1_18>, <prop1_19>, <prop1_20>, <iprop1_1>, <iprop1_2>
<iprop1_3>, <iprop1_4>, <iprop1_5>, <iprop1_6>
*End Instance
**
*Nset, nset=bottom, instance=Element-1, generate
  1,  21,   1
*Elset, elset=bottom, instance=Element-1, generate
  1,  20,   1
*Nset, nset=bottomleft, instance=Element-1
 1,
*Nset, nset=top, instance=Element-1, generate
 421,  441,    1
*Elset, elset=top, instance=Element-1, generate
 381,  400,    1
*End Assembly
